<?xml version="1.0"?>
<?xml-stylesheet type="text/xsl" href="http://jsbsim.sourceforge.net/JSBSimScript.xsl"?>
<runscript xmlns:xsi="http://www.w3.org/2001/XMLSchema-instance"
    xsi:noNamespaceSchemaLocation="http://jsbsim.sf.net/JSBSimScript.xsd"
    name="C172-01A takeoff run">
  <!--
    This run is for testing the C172 altitude hold autopilot
  -->

  <use aircraft="B17" initialize="reset00"/>
  <run start="0.0" end="0.1" dt="0.0083333">


    <event name="engine start">
      <description>Start the engine and set roll control to heading hold</description>
      <condition> sim-time-sec >= 0.25 </condition>

    </event>


  </run>
</runscript>
